<Lems>

<!-- Specify which component to run -->
<Target component="sim1"/>

<!-- Include core NeuroML2 ComponentType definitions -->
<Include file="Cells.xml"/>
<Include file="Networks.xml"/>
<Include file="Simulation.xml"/>

<Include file="gh3.xml"/>

    <pgh3Cell id="gh3test" v="-60.0" c="0.10" n="0.01" cer="100" a="0.46" nIR="0.008" rIR="0.282" />

<network id="net1">
    <population id="gh3test_pop" component="gh3test" size="1"/>
</network>

<Simulation id="sim1" length="2000s" step="0.005s" target="net1">

    <Display id="pgh3" title="GH3 example run"
        timeScale="1s" xmin="0" xmax="2100" ymin="-3" ymax="3">
        <Line id ="x" quantity="gh3test_pop[0]/x" scale="1"
            color="#000000" timeScale="1s"/>
    </Display>

    <OutputFile id="of0" fileName="hr.dat">
      <OutputColumn id="x" quantity="gh3test_pop[0]/x"/>
    </OutputFile>

</Simulation>

</Lems>
